# solvated ubiquitin molecule with AMOEBA force field

units           real
boundary        p p p

atom_style amoeba
#atom_modify sort 1000 7.0
bond_style      class2
angle_style     amoeba
dihedral_style  none

# per-atom properties required by AMOEBA or HIPPO

fix             amtype all property/atom i_amtype ghost yes
fix             extra all property/atom &
                i_amgroup i_ired i_xaxis i_yaxis i_zaxis d_pval ghost yes
fix             extra2 all property/atom i_polaxe

read_data       data.ubiquitin fix amtype NULL "Tinker Types"

pair_style      amoeba
pair_coeff      * * amoeba_ubiquitin.prm amoeba_ubiquitin.key

special_bonds   lj/coul 0.5 0.5 0.5 one/five yes

# setup force components this way so can dump them (AMOEBA or HIPPO also needs them for now)

fix             fhal all store/state 0 fx fy fz
fix             frepulse all store/state 0 fx fy fz
fix             fdisp all store/state 0 fx fy fz
fix             fpolar all store/state 0 fx fy fz
fix             fmpole all store/state 0 fx fy fz
fix             fqxfer all store/state 0 fx fy fz

# thermo output

compute virial all pressure NULL virial

thermo_style    custom step temp epair ebond eangle edihed eimp &
                emol etotal press c_virial[*]

# DEBUG: setup force components this way so can dump them

fix             fhal all store/state 0 fx fy fz
fix             frepulse all store/state 0 fx fy fz
fix             fdisp all store/state 0 fx fy fz
fix             fpolar all store/state 0 fx fy fz
fix             fmpole all store/state 0 fx fy fz
fix             fqxfer all store/state 0 fx fy fz

# zero step run

run             0
